// COMSOL Multiphysics 6.4.0.293 model "learnwithBK.mph"
// Outline of the model tree

Parameters
  Voltage = 1

Geometry
  geom1 "Geometry 1" (2D, length unit m)
    r1: Rectangle | size = {1, 0.8}
    c2: Circle | r = 0.26; pos = {0.5, 0.4}
    pt1: Point | p = {0.5, 0.4}
    fin: Finalize "Form Union"

Materials
  mat1: Common "Material 1" on all domains
    def: def "Basic"
      relpermittivity = 1
      electricconductivity = 100
  mat2: Common "Material 2" on domains 2
    def: def "Basic"
      electricconductivity = 2
      relpermittivity = 1

Physics
  ec: ConductiveMedia "Electric Currents" on all domains
    dependent variable V
    cucns1: CurrentConservationSolid "Current Conservation in Solids 1" (default)
    ein1: ElectricInsulation (default)
    init1: init "Initial Values 1" (default)
    gnd1: Ground on boundaries 4
    term1: Terminal "Boundary Terminal 1" on boundaries 1 | TerminalType = Voltage; V0 = Voltage

Mesh
  mesh1 "Mesh 1" (physics-controlled)
    size: MeshSizeDefault | hauto = 3

Studies
  std1 "Study 1"
    stat: Stationary

Solver configurations
  sol1 "Solution 1" (study std1)
    v1: Variables "Dependent Variables 1"
    s1: Stationary "Stationary Solver 1"
      dDef: Direct
      fc1: FullyCoupled

Datasets
  dset1: Solution | solution = sol1

Plots
  pg1: PlotGroup2D "Electric Potential (ec)" | data = dset1
    surf1: Surface | expr = V
    str1: Streamline on boundaries 1-8 | expr = {ec.Ex, ec.Ey}
      filt1: Filter | expr = !isScalingSystemDomain
  pg2: PlotGroup2D "Electric Field (ec)" | data = dset1
    surf1: Surface | expr = ec.normE
    str1: Streamline on boundaries 1-8 | expr = {ec.Ex, ec.Ey}
      filt1: Filter | expr = !isScalingSystemDomain